// COMSOL Multiphysics 5.4.0.346 model "ninepenguins.mph"
// Outline of the model tree

Parameters
  rho.air = 1.225[kg/m^3]
  visc.air = 1.8e-5[Pa*s]
  u.air = -5[m/s]
  k.air = 0.024[W/(m*K)]
  cp.air = 1000[J/(kg*K)]
  gamma.air = 1
  T.air = 233.15[K]
  T.penguin = 313.15[K]
  Qdot.penguin_kg = 3.53[W/kg]
  r.penguin = 0.23[m]
  heig.penguin = 1.2[m]
  mass.penguin = 30[kg]
  rho.penguin = mass.penguin/(heig.penguin*pi*(r.penguin)^2)
  Qdot.penguin = Qdot.penguin_kg*rho.penguin

Geometry
  geom1 "Geometry 1" (2D, length unit m)
    imp1: Import | type = dxf; filename = C:\Users\smk373\Desktop\PenguinModel\nine penguins no lines.DXF
    fin: Finalize "Form Union"

Physics
  spf: LaminarFlow on domains 1
    dependent variable u = {u, v, w}
    fp1: FluidProperties (default) | rho_mat = userdef; rho = rho.air; mu_mat = userdef; mu = visc.air
    init1: init "Initial Values 1" (default)
    wallbc1: WallBC "Wall 1" (default)

Mesh
  mesh1 "Mesh 1" (physics-controlled)

Studies
  std1 "Study 1"
    stat: Stationary