// COMSOL Multiphysics 5.4.0.346 model "ninepenguinssubtracted_heatfluxboundary.mph"
// Outline of the model tree

Parameters
  rho.air = 1.225[kg/m^3]
  visc.air = 1.8e-5[Pa*s]
  u.air = -5[m/s]
  k.air = 0.024[W/(m*K)]
  cp.air = 1000[J/(kg*K)]
  gamma.air = 1
  T.air = 273.15[K]-48[K]
  T.penguin = 313.15[K]
  Qdot.penguin_kg = 3.53[W/kg]
  r.penguin = 0.23[m]
  heig.penguin = 1.2[m]
  mass.penguin = 30[kg]
  rho.penguin = mass.penguin/(heig.penguin*pi*(r.penguin)^2)
  Qdot.penguin = Qdot.penguin_kg*rho.penguin
  k.human = 0.543[W/(m*K)]
  cp.human = 3470[J/(kg*K)]

Geometry
  geom1 "Geometry 1" (2D, length unit m)
    c1: Circle | r = .23
    c2: Circle | pos = {.75, 0}; r = .23
    c3: Circle | pos = {1.5, 0}; r = .23
    c4: Circle | pos = {2.25, 0}; r = .23
    c5: Circle | pos = {3, 0}; r = .23
    c6: Circle | pos = {.38, -.65}; r = .23
    c7: Circle | pos = {1.13, -.65}; r = .23
    c8: Circle | pos = {1.88, -.65}; r = .23
    c9: Circle | pos = {2.63, -.65}; r = .23
    r1: Rectangle | pos = {1.5, -.325}; base = center; size = {8, 6.65}
    dif1: Difference | input = r1; input2 = c1, c2, c3, c4, c5, c6, c7, c8, c9
    c10: Circle | r = .23
    c11: Circle | pos = {.75, 0}; r = .23
    c12: Circle | pos = {1.5, 0}; r = .23
    c13: Circle | pos = {2.25, 0}; r = .23
    c14: Circle | pos = {3, 0}; r = .23
    c15: Circle | pos = {.38, -.65}; r = .23
    c16: Circle | pos = {1.13, -.65}; r = .23
    c17: Circle | pos = {1.88, -.65}; r = .23
    c18: Circle | pos = {2.63, -.65}; r = .23
    fin: Finalize "Form Union"

Materials
  mat1: Common "Air" on domains 1
    def "Basic"
      thermalexpansioncoefficient = alpha_p(pA,T)
      molarmass = 0.02897
      bulkviscosity = muB(T)
      dynamicviscosity = eta(T)
      ratioofspecificheat = 1.4
      electricconductivity = 0[S/m]
      heatcapacity = Cp(T)
      density = rho(pA,T)
      thermalconductivity = k(T)
      soundspeed = cs(T)
      eta: Piecewise | arg = T; pieces = {200.0, 1600.0, -8.38278E-7+8.35717342E-8*T^1-7.69429583E-11*T^2+4.6437266E-14*T^3-1.06585607E-17*T^4}; argunit = K; fununit = Pa*s
      Cp: Piecewise | arg = T; pieces = {200.0, 1600.0, 1047.63657-0.372589265*T^1+9.45304214E-4*T^2-6.02409443E-7*T^3+1.2858961E-10*T^4}; argunit = K; fununit = J/(kg*K)
      rho: Analytic | expr = pA*0.02897/R_const[K*mol/J]/T; args = {pA, T}; dermethod = manual; argders = {{pA, d(pA*0.02897/R_const/T,pA)}, {T, d(pA*0.02897/R_const/T,T)}}; argunit = Pa,K; fununit = kg/m^3
      k: Piecewise | arg = T; pieces = {200.0, 1600.0, -0.00227583562+1.15480022E-4*T^1-7.90252856E-8*T^2+4.11702505E-11*T^3-7.43864331E-15*T^4}; argunit = K; fununit = W/(m*K)
      cs: Analytic | expr = sqrt(1.4*R_const[K*mol/J]/0.02897*T); args = T; dermethod = manual; argunit = K; fununit = m/s
      an1: Analytic | funcname = alpha_p; expr = -1/rho(pA,T)*d(rho(pA,T),T); args = {pA, T}; argunit = Pa, K; fununit = 1/K
      an2: Analytic "Analytic 2a" | funcname = muB; expr = 0.6*eta(T); args = T; argunit = K; fununit = Pa*s
    NonlinearModel
      BA = (def.gamma+1)/2
  mat2: Common "Silicon" on domains 2-10
    def "Basic"
      relpermeability = 1
      electricconductivity = 1e-12[S/m]
      thermalexpansioncoefficient = 2.6e-6[1/K]
      heatcapacity = 700[J/(kg*K)]
      relpermittivity = 11.7
      density = 2329[kg/m^3]
      thermalconductivity = 130[W/(m*K)]
    Enu "Young's modulus and Poisson's ratio"
      youngsmodulus = 170e9[Pa]
      poissonsratio = 0.28
    RefractiveIndex
      n = 3.48
      ki = 0

Physics
  spf: LaminarFlow on domains 1
    dependent variable u = {u, v, w}
    fp1: FluidProperties (default) | rho_mat = userdef; rho = rho.air; mu_mat = userdef; mu = visc.air
    init1: init "Initial Values 1" (default) | u_init = {0, u.air, 0}
    wallbc1: WallBC "Wall 1" (default)
    inl1: InletBoundary "Inlet 1" on boundaries 3 | U0in = -u.air
    out1: OutletBoundary "Outlet 1" on boundaries 2
  ht: HeatTransferInFluids on domains 1
    dependent variable T
    fluid1: FluidHeatTransferModel "Fluid 1" (default)
      k_mat = userdef
      k = k.air
      rho_mat = userdef
      rho = rho.air
      Cp_mat = userdef
      Cp = cp.air
      gamma_mat = userdef
      gamma = gamma.air
      minput_velocity_src = root.comp1.u
      minput_pressure_src = root.comp1.spf.pA
    init1: init "Initial Values 1" (default) | Tinit = T.air
    ins1: ThermalInsulation (default)
    ifl1: Inflow on boundaries 3 | Tustr = T.air
    hf1: HeatFluxBoundary "Heat Flux 1" on boundaries 2
    temp1: TemperatureBoundary "Temperature 1" on boundaries 5-40 | T0 = T
  ht2: HeatTransfer "Heat Transfer in Solids 2" on domains 2-10
    dependent variable T2
    solid1: SolidHeatTransferModel "Solid 1" (default)
      k_mat = userdef
      k = k.human*10
      rho_mat = userdef
      rho = rho.penguin
      Cp_mat = userdef
      Cp = cp.human
    init1: init "Initial Values 1" (default) | Tinit = T.penguin
    ins1: ThermalInsulation (default)
    temp1: TemperatureBoundary "Temperature 1" (disabled) on boundaries 5-40 | T0 = T
    hs1: HeatSource on domains 2-10 | Q0 = Qdot.penguin
    hf1: HeatFluxBoundary "Heat Flux 1" on boundaries 6 | HeatFluxType = ConvectiveHeatFlux; h = 50; Text = T

Mesh
  mesh1 "Mesh 1" (physics-controlled)
    size: MeshSizeDefault | hauto = 9

Studies
  std1 "Study 1"
    stat: Stationary

Solver configurations
  sol1 "Solution 1" (study std1)
    v1: Variables "Dependent Variables 1"
    s1: Stationary "Stationary Solver 1"
      fc1: FullyCoupled | linsolver = d1; initstep = 0.01; minstep = 1.0E-6; maxiter = 100
      d1: Direct | linsolver = pardiso; pivotperturb = 1.0E-13

Datasets
  dset1: Solution | solution = sol1

Plots
  pg1: PlotGroup2D "Velocity (spf)" | data = dset1
    surf1: Surface | expr = spf.U
    arws1: ArrowSurface | expr = {u, v}
  pg3: PlotGroup2D "Temperature (ht)" | data = dset1
    surf1: Surface | expr = T
    surf2: Surface | expr = T2
  pg5: PlotGroup2D "Temperature (ht2)" | data = dset1
    surf1: Surface | expr = T2