// COMSOL Multiphysics 5.4.0.346 model "singlepenguin_actualparameters.mph"
// Outline of the model tree

Parameters
  rho.air = 1.225[kg/m^3]
  visc.air = 1.8e-5[Pa*s]
  u.air = -10[m/s]
  k.air = 0.024[W/(m*K)]
  cp.air = 1000[J/(kg*K)]
  gamma.air = 1
  T.air = 233.15[K]
  T.penguin = 313.15[K]
  Qdot.penguin_kg = 3.53[W/kg]
  r.penguin = 0.23[m]
  heig.penguin = 1.2[m]
  mass.penguin = 30[kg]
  rho.penguin = mass.penguin/(heig.penguin*pi*(r.penguin)^2)
  Qdot.penguin = Qdot.penguin_kg*rho.penguin
  k.human = 0.543[W/(m*K)]
  cp.human = 3470[J/(kg*K)]

Geometry
  geom1 "Geometry 1" (2D, length unit m)
    sq1: Square | base = center; size = 10
    c1: Circle | r = .23
    dif1: Difference | input = sq1; input2 = c1
    c2: Circle | r = .23
    fin: Finalize "Form Union"

Materials
  mat1: Common "Silicon" on domains 2
    def "Basic"
      relpermeability = 1
      electricconductivity = 1e-12[S/m]
      thermalexpansioncoefficient = 2.6e-6[1/K]
      heatcapacity = 700[J/(kg*K)]
      relpermittivity = 11.7
      density = 2329[kg/m^3]
      thermalconductivity = 130[W/(m*K)]
    Enu "Young's modulus and Poisson's ratio"
      youngsmodulus = 170e9[Pa]
      poissonsratio = 0.28
    RefractiveIndex
      n = 3.48
      ki = 0

Physics
  spf: LaminarFlow on domains 1
    dependent variable u = {u, v, w}
    fp1: FluidProperties (default) | rho_mat = userdef; rho = rho.air; mu_mat = userdef; mu = visc.air
    init1: init "Initial Values 1" (default) | u_init = {0, u.air, 0}
    wallbc1: WallBC "Wall 1" (default)
    inl1: InletBoundary "Inlet 1" on boundaries 3 | U0in = -u.air
    out1: OutletBoundary "Outlet 1" on boundaries 2 | BoundaryCondition = Pressure
  ht: HeatTransferInFluids on domains 1
    dependent variable T
    fluid1: FluidHeatTransferModel "Fluid 1" (default)
      k_mat = userdef
      k = k.air
      rho_mat = userdef
      rho = rho.air
      Cp_mat = userdef
      Cp = cp.air
      gamma_mat = userdef
      gamma = gamma.air
      minput_velocity_src = root.comp1.u
    init1: init "Initial Values 1" (default) | Tinit = T.air
    ins1: ThermalInsulation (default)
    ifl1: Inflow on boundaries 3 | Tustr = T.air
    hf1: HeatFluxBoundary "Heat Flux 1" on boundaries 2
    temp1: TemperatureBoundary "Temperature 1" on boundaries 5-8 | T0 = T2
  ht2: HeatTransfer "Heat Transfer in Solids 2" on domains 2
    dependent variable T2
    solid1: SolidHeatTransferModel "Solid 1" (default)
      k_mat = userdef
      k = k.human*10
      rho_mat = userdef
      rho = rho.penguin
      Cp_mat = userdef
      Cp = cp.human
    init1: init "Initial Values 1" (default) | Tinit = T.penguin
    ins1: ThermalInsulation (default)
    temp1: TemperatureBoundary "Temperature 1" on boundaries 5-8 | T0 = T2
    hs1: HeatSource on domains 2 | heatSourceType = GeneralSource; Q0 = Qdot.penguin

Mesh
  mesh1 "Mesh 1" (physics-controlled)
    size: MeshSizeDefault | table = cfd; hauto = 6

Studies
  std1 "Study 1"
    stat: Stationary

Solver configurations
  sol1 "Solution 1" (study std1)
    v1: Variables "Dependent Variables 1"
    s1: Stationary "Stationary Solver 1"
      fc1: FullyCoupled | linsolver = d1; initstep = 0.01; minstep = 1.0E-6; maxiter = 100
      d1: Direct | linsolver = pardiso; pivotperturb = 1.0E-13

Datasets
  dset1: Solution | solution = sol1

Derived values
  av1: AvLine "Line Average 1" on boundaries 5-8
    data = dset1
    table = tbl1
    expr = {ht.ntflux, ht2.ntflux, ht2.Qtot}
    unit = {W/m^2, W/m^2, W/m^3}
    descr = {Normal total heat flux, Normal total heat flux, Total heat source}

Tables
  tbl1: Table
    // Line Average 1 (ht2.ntflux)
    Normal total heat flux (W/m^2) | Normal total heat flux (W/m^2) | Total heat source (W/m^3)
    -60.5428 | 60.5434 | 531.018

Plots
  pg3: PlotGroup2D "Temperature (ht) 1" | data = dset1
    surf1: Surface | expr = T; descr = Temperature; rangeisshared = on
    surf2: Surface | expr = T2
  pg1: PlotGroup2D "Velocity (spf) 1" | data = dset1
    surf1: Surface | expr = spf.U
  pg2: PlotGroup2D "Pressure (spf) 1" (disabled) | data = dset1
    con1: Contour | expr = p
  pg8: PlotGroup1D "Steady.Heat Flux (ht) 1" | data = dset1
    lngr1: LineGraph on boundaries 5-8 | expr = ht2.ntflux; descr = Normal total heat flux

Exports
  img1: Image2D "Image 1"
    size = current
    weblockratio = off
    webwidth = 800
    webheight = 600
    webresolution = 96
    printlockratio = off
    printwidth = 120
    printheight = 90
    printresolution = 300
    pngfilename = C:\Users\ip246\Desktop\PenguinModel\Temperature.png
    options = on
    axes = on